// SBML level 3 version 1

function min(x, y)
  piecewise(x, x < y, y);
end

model ReplicationInitiation()
  // Replication Initiation

  // Compartments:
  compartment cell = 0 litre;

  // Species:
  species cell_ADP in cell = 0;  // substance in mole
  species cell_ATP in cell = 0;  // substance in mole
  species cell_DnaA in cell = 0;  // substance in mole
  species cell_DnaA_1merADP in cell = 0;  // substance in mole
  species cell_DnaA_1merATP in cell = 0;  // substance in mole
  species cell_DnaA_2merATP in cell = 0;  // substance in mole
  species cell_DnaA_3merATP in cell = 0;  // substance in mole
  species cell_DnaA_4merATP in cell = 0;  // substance in mole
  species cell_DnaA_5merATP in cell = 0;  // substance in mole
  species cell_DnaA_6merATP in cell = 0;  // substance in mole
  species cell_DnaA_7merATP in cell = 0;  // substance in mole
  species cell_H in cell = 0; cell_H is "H+";  // substance in mole
  species cell_NonOriginHigh_ADP in cell = 0;
  species cell_NonOriginHigh_ATP in cell = 0;
  species cell_NonOriginMedium_ADP in cell = 0;
  species cell_NonOriginMedium_ATP in cell = 0;
  species cell_PI in cell = 0;  // substance in mole
  species cell_R1_ADP in cell = 0;
  species cell_R1_ATP in cell = 0;
  species cell_R2_ADP in cell = 0;
  species cell_R2_ATP in cell = 0;
  species cell_R3_ADP in cell = 0;
  species cell_R3_ATP in cell = 0;
  species cell_R4_ADP in cell = 0;
  species cell_R4_ATP in cell = 0;
  species cell_water in cell = 0;  // substance in mole

  // Parameters:
  K_Regen_P4 = 0;
  activation = 1;
  binding = 0;
  displacing = 0;
  dissociation = 0;
  k_Regen = 0;
  membraneConc = 0;
  reactivation = 0;
  sometimes = 0;

  // Reactions:
  reaction: cell_DnaA_2merATP + 2 cell_water => 2 cell_DnaA_1merADP + 2 cell_H + 2 cell_PI; 0; reaction is "DnaA_2merATP + water -> DnaA_1merADP + H + PI";
  reaction_1: cell_DnaA_3merATP + 3 cell_water => 3 cell_DnaA_1merADP + 3 cell_H + 3 cell_PI; 0; reaction_1 is "DnaA_3merATP + water -> DnaA_1merADP + H + PI";
  DnaA_1merATP_R3_ATP: cell_DnaA_1merATP => cell_R3_ATP; 0; DnaA_1merATP_R3_ATP is "DnaA_1merATP -> R3_ATP";
  DnaA_1merATP_R4_ATP: cell_DnaA_1merATP => cell_R4_ATP; 0; DnaA_1merATP_R4_ATP is "DnaA_1merATP -> R4_ATP";
  DnaA_1merATP_NonOriginHigh_ATP: cell_DnaA_1merATP => cell_NonOriginHigh_ATP; 0; DnaA_1merATP_NonOriginHigh_ATP is "DnaA_1merATP -> NonOriginHigh_ATP";
  DnaA_1merATP_NonOriginMedium_ATP: cell_DnaA_1merATP => cell_NonOriginMedium_ATP; 0; DnaA_1merATP_NonOriginMedium_ATP is "DnaA_1merATP -> NonOriginMedium_ATP";
  DnaA_1merADP_R1_ADP: cell_DnaA_1merADP => cell_R1_ADP; 0; DnaA_1merADP_R1_ADP is "DnaA_1merADP -> R1_ADP";
  DnaA_1merADP_R2_ADP: cell_DnaA_1merADP => cell_R2_ADP; 0; DnaA_1merADP_R2_ADP is "DnaA_1merADP -> R2_ADP";
  DnaA_1merADP_R3_ADP: cell_DnaA_1merADP => cell_R3_ADP; 0; DnaA_1merADP_R3_ADP is "DnaA_1merADP -> R3_ADP";
  DnaA_1merADP_R4_ADP: cell_DnaA_1merADP => cell_R4_ADP; 0; DnaA_1merADP_R4_ADP is "DnaA_1merADP -> R4_ADP";
  DnaA_1merADP_NonOriginHigh_ADP: cell_DnaA_1merADP => cell_NonOriginHigh_ADP; 0; DnaA_1merADP_NonOriginHigh_ADP is "DnaA_1merADP -> NonOriginHigh_ADP";
  DnaA_1merADP_NonOriginMedium_ADP: cell_DnaA_1merADP => cell_NonOriginMedium_ADP; 0; DnaA_1merADP_NonOriginMedium_ADP is "DnaA_1merADP -> NonOriginMedium_ADP";
  reaction_2: cell_DnaA_4merATP + 4 cell_water => 4 cell_DnaA_1merADP + 4 cell_H + 4 cell_PI; 0; reaction_2 is "DnaA_4merATP + water -> DnaA_1merADP + H + PI";
  DnaA_ATP_DnaA_1merATP: cell_ATP + cell_DnaA => cell_DnaA_1merATP; activation*cell_ATP*cell_DnaA; DnaA_ATP_DnaA_1merATP is "DnaA + ATP -> DnaA_1merATP";  // fast
  reaction_4: cell_DnaA_5merATP + 5 cell_water => 5 cell_DnaA_1merADP + 5 cell_H + 5 cell_PI; 0; reaction_4 is "DnaA_5merATP + water -> DnaA_1merADP + H + PI";
  reaction_5: cell_DnaA_6merATP + 6 cell_water => 6 cell_DnaA_1merADP + 6 cell_H + 6 cell_PI; 0; reaction_5 is "DnaA_6merATP + water -> DnaA_1merADP + H + PI";
  reaction_6: cell_DnaA_7merATP + 7 cell_water => 7 cell_DnaA_1merADP + 7 cell_H + 7 cell_PI; 0; reaction_6 is "DnaA_7merATP + water -> DnaA_1merADP + H + PI";
  DnaA_1merATP_R1_ATP: cell_DnaA_1merATP => cell_R1_ATP; 0; DnaA_1merATP_R1_ATP is "DnaA_1merATP -> R1_ATP";
  reaction_8: cell_ATP + cell_DnaA_1merADP => cell_ADP + cell_DnaA_1merATP; min(min(cell_DnaA_1merADP*k_Regen*membraneConc/(K_Regen_P4 + membraneConc), cell_DnaA_1merADP), cell_ATP); reaction_8 is "DnaA_1merADP + ATP -> DnaA_1merATP + ADP";
  DnaA_1merATP_R2_ATP: cell_DnaA_1merATP => cell_R2_ATP; 0; DnaA_1merATP_R2_ATP is "DnaA_1merATP -> R2_ATP";

  // Events:
  bindingEvent: at (cell_water*cell_DnaA_2merATP*cell_DnaA_3merATP*cell_DnaA_4merATP*cell_DnaA_5merATP*cell_DnaA_6merATP*cell_DnaA_7merATP <= 0), t0=false: dissociation = 0, binding = 1;
  displacingEvent: at (sometimes < 0): binding = 0, displacing = 1;
  event2: at (min(cell_ATP, cell_DnaA) <= 0), t0=false: activation = 0, dissociation = 1;
  reactivationEvent: at (sometimes < 0): displacing = 0, reactivation = 1;
end
